# [area: ИСХОДНЫЕ ДАННЫЕ]
D := 190*10^-3 = 0.19  # м
V_ср := 400
ν_min := 6  # об/с
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ν_max := 8  # об/с
J_Σ := 140  # Н*с
φ := π/4
t_в := 3*10^-3 = 0.003  # с
ΔT_нmin := -50 + 273 = 223  # К
ΔT_нmax := 50 + 273 = 323  # К
m_ду := 0.51  # кг
# [area: СХЕМА]
D_к := 75*10^-3 = 0.075
h := 0.003*sqrt(2)  # зазор сектора
# Окружность
y_1(x) := sqrt((D/2)^2 - x^2)
x_1 := -D/2, -D/2 + 0.00001 .. D/2
# Линии сектора
y_2(x) := tan(φ)*x + h
y_22(x) := -tan(φ)*x + h
x_2 := 0, 0.000001 .. D/2
x_3 := -D/2, -D/2 + 0.00001 .. 0
b := D_к/2 = 0.0375
# Правая нижняя точка
yy_1 := b + h
xx_1 := b
# Левая нижняя точка
yy_2 := yy_1
xx_2 := -b
# Соединение левой и правой нижних точек
y_4(x) := yy_1
x_4 := xx_2, xx_2 + 0.001 .. xx_1
# Y по верхней точке
y_1(b) = 0.0872855
# Соединение левой и правой верхних точек
y_5(x) := y_1(b)
x_5 := x_4
# Левые и правые соединения нижних и верхних точек
y_6 := stack(yy_1, y_1(b)) = [0.0417426; 0.0872855]
x_6 := stack(xx_2, xx_2) = [-0.0375; -0.0375]
y_7 := stack(yy_1, y_1(b)) = [0.0417426; 0.0872855]
x_7 := stack(xx_1, xx_1) = [0.0375; 0.0375]
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# [area: Определение наружного и внутреннего диаметров ИДК]
p_max := 90  # МПа
σ_д := 1500  # МПа
η := 1.1
δ_ст1 := η*p_max*D_к/(2*σ_д) = 0.002475
δ_ст1 := round(δ_ст1, 4) = 0.0025
δ_ст := max(δ_ст1, 1.2*10^-3) = 0.0025  # если посчитанная толщина меньше технологической
D_км := round(D_к - 2*δ_ст, 3) = 0.07
# [area: Определение времени работы ИДК]
t_дmin := 1/ν_max*2*φ/(2*π) = 0.03125  # с
t_дmax := 1/ν_min*2*φ/(2*π) = 0.0416667  # с
t_д := t_дmin = 0.03125
ξ_tabl := [
    0.01, 0.5, 0.5;
    0.02, 0.55, 0.52;
    0.03, 0.65, 0.59;
    0.04, 0.75, 0.68;
    0.05, 0.79, 0.71;
    0.06, 0.8, 0.72;
    0.07, 0.8, 0.72
]
t := ξ_tabl[:, 0]
ξξ_1 := ξ_tabl[:, 1]
ξξ_2 := ξ_tabl[:, 2]
ξ_1(t_d) := interp(cspline(t, ξξ_1), t, ξξ_1, t_d)
ξ_2(t_d) := interp(cspline(t, ξξ_2), t, ξξ_2, t_d)
ξ_1(t_д) = 0.66397
ξ_2(t_д) = 0.601848
ξ := ξ_1(t_д) = 0.66397
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# Время горения заряда топлива:
t_г := t_д/4*(5*ξ - 1) - 3/8*t_в = 0.0169988
t_г := 0.026491
# Время последействия тяги:
t_п := t_д - t_в - t_г = 0.001759
# [area: Действительное значение коэффициента тяги]
ζ_tabl := [1.4, 1.46; 1.6, 1.51; 1.8, 1.56; 2, 1.6; 2.2, 1.62; 2.4, 1.64; 2.6, 1.67]
ζ_cs := ζ_tabl[:, 0]
K_тcs := ζ_tabl[:, 1]
K_т(ζ) := interp(cspline(ζ_cs, K_тcs), ζ_cs, K_тcs, ζ)
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ζ := 1.3
K_т := K_т(ζ) = 1.4374
# Потери на тепло и скорость:
φ_1 := 0.95
φ_2 := 0.95
K_д := φ_1*φ_2*K_т = 1.29725
# [area: Величина тяги на квазистационарном участке]
# от 0,92 до 0,98
K_1 := 0.92  # учитывает снижение эффективности тяги для вращающихся ЛА
# от 0,9 до 1,05 для дозвука
K_2 := 0.9  # поправка на усиление реакции выдуваемого потока на поверхность ЛА
a_зв := 340.4
M := V_ср/a_зв = 1.17509
P := ceil(J_Σ/(K_1*K_2*ξ*t_д)) = 8149
# [area: Выбор марки топлива]
топливо := "Б-3"
toplivo := [
    "Показ/топл", "П-1", "П-2", "П-3", "Б-1", "Б-2", "Б-3";
    "Плотность", 1.6*10^3, 1.62*10^3, 1.65*10^3, 1.61*10^3, 1.62*10^3, 1.64*10^3;
    "Сила пороха", 1.03*10^6, 1.04*10^6, 1.04*10^6, 9.2*10^5, 1.035*10^6, 1.04*10^6;
    "Газ пост", 360, 349, 359, 347, 345, 338;
    "Темп торм", 2.86*10^3, 2.98*10^3, 2.9*10^3, 2.655*10^3, 3*10^3, 3.08*10^3;
    "Показ адиаб", 1.2, 1.24, 1.25, 1.24, 1.23, 1.25;
    "Ед импульс", 2.15*10^3, 2.25*10^3, 2.2*10^3, 2.2*10^3, 2.25*10^3, 2.3*10^3;
    "Термохим", 400, 278, 400, 280, 310, 370;
    "u_г р=50МПа", 43.3, 44.3, 38.4, 37.4, 49.1, 61.1;
    "u_г р=80МПа", 68.8, 76.8, 55.4, 50.7, 74.6, 84.5
]
# Законы скоростей горения:
u_г(p) :=
    a ←
        0.003*p^0.7 if 5 ≤ p ≤ 45 and топливо == "П-1"
        0.00046*(p - 42)^1.17 + 0.0381 if 45 < p ≤ 60 and топливо == "П-1"
        (0.00086*p) if p > 60 and топливо == "П-1"
    a ← 0.0000315*(9.81*p)^1.17 if 20 ≤ p ≤ 150 and топливо == "П-2"
    a ← 0.000306*(9.81*p)^0.78 if 39 ≤ p ≤ 200 and топливо == "П-3"
    a ← 0.00294*p^0.65 if 30 ≤ p ≤ 80 and топливо == "Б-1"
    a ← 0.000198*(9.81*p)^0.89 if 34 ≤ p ≤ 150 and топливо == "Б-2"
    a ← 0.00085*(9.81*p)^0.69 if 16 ≤ p ≤ 150 and топливо == "Б-3"
    a
i :=
    1 if топливо == "П-1"
    2 if топливо == "П-2"
    3 if топливо == "П-3"
    4 if топливо == "Б-1"
    5 if топливо == "Б-2"
    6 if топливо == "Б-3"
ρ_т := toplivo[:, i][1] = 1640
f := toplivo[:, i][2] = 1040000
R := toplivo[:, i][3] = 338
T_0 := toplivo[:, i][4] = 3080
k := toplivo[:, i][5] = 1.25
J_уд := toplivo[:, i][6] = 2300
B_т := toplivo[:, i][7] = 370
T_N := 291
F_3(T_з) := B_т/(B_т - (T_з - T_N))
p := 5, 5.01 .. p_max
F_1(p) := u_г(p)
e_t(p, T_з) := F_1(p)*F_3(T_з)
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p_N1 := 0.95*p_max = 85.5
p_m1 := 0.6*p_max = 54
T_зmax := ΔT_нmax
T_зmin := ΔT_нmin
Given
F_1(p_N1)/p_N1 == F_1(p_max)*F_3(T_зmax)/p_max
F_1(p_m1)/p_m1 == F_1(p_max)*F_3(T_зmax)/(p_max*F_3(T_зmin))
[p_IN; p_min] := Find(p_N1, p_m1) = [67.2228; 39.008]  # в МПа
# [area: Определение геометрических размеров сопла]
F_кр := P/(K_д*p_IN*10^6)  # disabled  # м^2
K_д = 1.29725
F_кр := P/(1.188*p_IN*10^6) = 0.00010204  # м^2
P = 8149
p_IN = 67.2228
D_кр := sqrt(4*F_кр/π) = 0.0113983  # м
φ_вх := 80 deg
φ_с := 20 deg
D_a := D_кр*ζ = 0.0148178
# Длины участков сопла:
ζ_ф := 1  # для прямых сопел
L_1 := round((D_км - ζ_ф*D_кр)/(2*tan(φ_вх)), 4) = 0.0052  # м
D_км = 0.07
L_2 := 0.002 = 0.002  # м
L_3 := round(D_кр/(2*tan(φ_с))*(ζ - 1), 5) = 0.0047  # м
# [area: Определение длины ДУ]
y_1(x) := sqrt((D/2)^2 - x^2)
y_1(D_a/2) = 0.0947107
y_8 := stack(y_1(D_a/2), y_1(D_a/2)) = [0.0947107; 0.0947107]
x_8 := stack(-D_a/2, D_a/2) = [-0.00740891; 0.00740891]
y_9(x) := y_1(D_a/2)
x_9 := -D_a/2, -D_a/2 + 0.0001 .. D_a/2
L_ду := y_1(D_a/2) - yy_1 = 0.052968
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# [area: Расчет газодинамических параметров в выходном сечении сопла]
pi(λ) := (1 - ((k - 1)/(k + 1)*λ^2))^(k/(k - 1))
q(λ) := λ*(1 - ((k - 1)/(k + 1)*λ^2))^(1/(k - 1))/(2/(k + 1))^(1/(k - 1))
τ(λ) := 1 - (k - 1)/(k + 1)*λ^2
λ_1 := 1.5
Given
q(λ_1) == 1/ζ^2
λ_a := Find(λ_1) = 1.68596
a_кр := sqrt(2*k/(k + 1)*R*T_0) = 1075.51
k = 1.25
# Параметры в выходном сечении сопла:
R = 338
T_0 = 3080
V_a := λ_a*a_кр = 1813.26
p_a := p_IN*pi(λ_a) = 10.0771  # МПа
T_a := T_0*τ(λ_a) = 2107.24
ρ_a := p_a*10^6/(R*T_a) = 14.1483
# [area: Экстраполяция (топливо Б-3)]
range(start, stop, step) :=
    i ← 0
    while start ≤ stop
        a[i] ← start
        i ← i + 1
        start ← start + step
    a
# ДО:
p_экстр := range(16, 150, 1)
u_г_экстр := 0.00085*(9.81*p_экстр)^0.69
u_г_экстр := reverse(u_г_экстр)
m := 134
n := 17
yp := predict(u_г_экстр, m, n)
k_экстр := 0 .. n - 1
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yp := reverse(yp)
p_new_экстр := range(0, 16, 1)
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resh := regress(p_new_экстр, yp, 3) = [3; 3; 3; 0.00208943; 0.0019326; -3.01311e-5; 3.20748e-7]
# ПОСЛЕ:
p_экстр := range(16, 150, 1)
u_г_экстр := 0.00085*(9.81*p_экстр)^0.69
m := 134
n := 101
yp := predict(u_г_экстр, m, n)
k_экстр := 0 .. n
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p_new_экстр := range(150, 250, 1)
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length(p_new_экстр) = 101
length(yp) = 101
resh1 := regress(p_new_экстр, yp, 3) = [3; 3; 3; 0.143545; -0.00163795; 1.58873e-5; -3.69242e-8]
p := 0, 1 .. 250
u_г(p) :=
    resh[3] + resh[4]*p + resh[5]*p^2 + resh[6]*p^3 if 0 ≤ p < 16
    0.00085*(9.81*p)^0.69 if 16 ≤ p < 150
    resh1[3] + resh1[4]*p + resh1[5]*p^2 + resh1[6]*p^3 if 150 ≤ p < 250
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u(p, T_з) := u_г(p/10^6)*F_3(T_з)
# [area: Проектирование заряда]
n(m) :=
    i ← 1
    k ← 0
    while i ≤ m
        k ← k + (m - i)
        i ← i + 2
    1 + 3*k
A(k) := sqrt(k*(2/(k + 1))^((k + 1)/(k - 1)))
μ_c := 0.95
G_p := μ_c*A(k)*F_кр*p_IN*10^6/sqrt(R*T_0) = 4.20287
ω_т := G_p*t_г = 0.111338
e_0 := round(2*F_1(p_min)*F_3(T_зmin)*t_г, 4) = 0.0023
S_г := ω_т/(ρ_т*u(p_IN*10^6, 18 + 273)*t_г) = 0.0342015
G_т := S_г*u(p_IN*10^6, 18 + 273)*ρ_т = 4.20287
G_т == G_p
G_p = 4.20287
χ_кр := 180
m := stack(3, 5, 7, 9, 11) = [3; 5; 7; 9; 11]
tabl(количество_шашек) :=
    dz ← 0.001
    for j ∈ 0 .. length(m) - 1
        D_н[j] ← (D_км - dz)/m[j]
        D_в[j] ← D_н[j] - 2*e_0
        n[j] ← количество_шашек(m[j])
        L_з[j] ← S_г/(π*n[j]*(D_н[j] + D_в[j]))
        χ_вн[j] ← 4*L_з[j]/D_в[j]
        χ_нар[j] ← 4*n[j]*D_н[j]*L_з[j]/(D_км^2 - n[j]*D_н[j]^2)
        ε_s[j] ← (D_н[j]^2 - D_в[j]^2)/D_км^2*n[j]
        Sh[j] ← 4*F_кр/(π*D_км^2*(1 - ε_s[j]))
        определитель[j] ← "подходит" if 0 < χ_вн[j] < χ_кр + 10 and 0 < χ_нар[j] < χ_кр + 10 and Sh[j] < 0.75 and (L_1 + L_2 + L_3 + L_з[j] < L_ду) and (D_в[j] > 1.5*10^-3)
        определитель[j] ← "не подходит" otherwise
    augment(m, n, D_н, D_в, L_з, χ_вн, χ_нар, ε_s, Sh, определитель)
# m | n | D_н | D_в | L_з | χ_вн | χ_нар | ε_s | Sh
tabl(n) = [
    3, 7, 0.023, 0.0184, 0.0375662, 8.16657, 20.2111, 0.272057, 0.036424, "подходит";
    5, 19, 0.0138, 0.0092, 0.0249123, 10.8314, 20.3864, 0.410245, 0.0449587, "подходит";
    7, 37, 0.00985714, 0.00525714, 0.0194673, 14.8121, 21.7632, 0.52499, 0.0558191, "подходит";
    9, 61, 0.00766667, 0.00306667, 0.0166277, 21.6883, 23.6619, 0.614648, 0.0688061, "подходит";
    11, 91, 0.00627273, 0.00167273, 0.0150569, 36.0056, 26.0563, 0.678769, 0.0825406, "подходит"
]
# Выбранный вариант:
i := 4
m := tabl(n)[:, 0][i] = 11
n_k := tabl(n)[:, 1][i] = 91
D_нк := tabl(n)[:, 2][i] = 0.00627273
D_вк := tabl(n)[:, 3][i] = 0.00167273
D_нI := round(D_нк*10000)/(10*1000) = 0.0063
D_вI := round(D_вк*10000)/(10*1000) = 0.0017
e_0 := (D_нI - D_вI)/2 = 0.0023
m*D_нк = 0.069
shashki :=
    1 if D_нI > 7*10^-3
    3 otherwise
nn := n_k - n(shashki) = 84
D_зарядов := m*D_нк = 0.069
# Длина заряда, обеспечивающая заданную длину горения с убранными шашками:
L_зI := round(S_г/(π*nn*(D_нI + D_вI)), 4) = 0.0162
# Коэффициент заполнения поперечного сечения:
ε_s := (D_нI^2 - D_вI^2)/D_км^2*nn = 0.630857
# Постоянная коэффициента теплоотдачи (теплоизолированная стенка лекция 7):
σ_т := 420
# Безразмерная температура стенки:
ν_т := 0.7
# Длина цилиндрической  обечайки:
l := L_зI = 0.0162
# Диаметр камеры ДУ
D_к := D_км = 0.07
S_торца := π*D_нI^2/4 - π*D_вI^2/4 = 2.89027e-5  # площадь торца заряда
W_з := S_торца*l*nn  # объем зарядов
W_з = 3.93307e-5
W_к := 1.3*l*π*D_к^2/4 = 8.10484e-5  # объем камеры сгорания
W_0 := W_к - W_з = 4.17176e-5  # свободный объем
W_0 = 4.17176e-5
M_заряда := W_з*ρ_т = 0.0645024
# Площадь боковой поверхности усеченного конуса:
r_s := D_кр/2 = 0.00569916
l_кон := L_1/cos(φ_вх) = 0.0299456
r_b := sqrt(l_кон^2 - L_1^2) + r_s = 0.0351898
F_ускон := π*l_кон*(r_s + r_b) = 0.00384671
# Площадь цилиндрической части:
F_цил := W_0/l = 0.00257516
# Площадь сферы:
a_сф := r_b
h_сф := 0.7*D_км/2 = 0.0245
F_сф := π*(a_сф^2 + h_сф^2) = 0.00577605
F_охл := F_цил + F_ускон + F_сф = 0.0121979  # площадь поверхности охлаждения
Q := k/(k - 1)*R*T_0 = 5205200
χ_тепл := 1 - σ_т*ν_т*F_охл*p_min*10^6/(R*Q*(S_г*u(p_min*10^6, -60 + 273)*ρ_т)) - k/(k - 1)*p_min*10^6/(ρ_т*Q) = 0.943806
G_p := μ_c*A(k)*F_кр*p_IN*10^6/sqrt(χ_тепл*R*T_0) = 4.32619
ω_т := G_p*t_г = 0.114605
t_г = 0.026491
S_г := ω_т/(ρ_т*u(p_IN*10^6, 18 + 273)*t_г) = 0.035205
u(p_IN*10^6, 18 + 273) = 0.0749302
G_т := S_г*u(p_IN*10^6, 18 + 273)*ρ_т = 4.32619
G_т == G_p
G_p = 4.32619
m := stack(3, 5, 7, 9, 11) = [3; 5; 7; 9; 11]
tabl(количество_шашек) :=
    dz ← 0.001
    for j ∈ 0 .. length(m) - 1
        D_н[j] ← (D_км - dz)/m[j]
        D_в[j] ← D_н[j] - 2*e_0
        n[j] ← количество_шашек(m[j])
        L_з[j] ← S_г/(π*n[j]*(D_н[j] + D_в[j]))
        χ_вн[j] ← 4*L_з[j]/D_в[j]
        χ_нар[j] ← 4*n[j]*D_н[j]*L_з[j]/(D_км^2 - n[j]*D_н[j]^2)
        ε_s[j] ← (D_н[j]^2 - D_в[j]^2)/D_км^2*n[j]
        Sh[j] ← 4*F_кр/(π*D_км^2*(1 - ε_s[j]))
        определитель[j] ← "подходит" if (0 < χ_вн[j] < χ_кр + 10) and (0 < χ_нар[j] < χ_кр + 10) and (ε_s[j] > 0.5) and (Sh[j] < 0.75) and (L_1 + L_2 + L_3 + L_з[j] < L_ду) and (D_в[j] > 1.5*10^-3)
        определитель[j] ← "не подходит" otherwise
    augment(m, n, D_н, D_в, L_з, χ_вн, χ_нар, ε_s, Sh, определитель)
# m | n | D_н | D_в | L_з | χ_вн | χ_нар | ε_s | Sh
tabl(n) = [
    3, 7, 0.023, 0.0184, 0.0386684, 8.40617, 20.804, 0.272057, 0.036424, "не подходит";
    5, 19, 0.0138, 0.0092, 0.0256432, 11.1492, 20.9845, 0.410245, 0.0449587, "не подходит";
    7, 37, 0.00985714, 0.00525714, 0.0200385, 15.2467, 22.4017, 0.52499, 0.0558191, "подходит";
    9, 61, 0.00766667, 0.00306667, 0.0171155, 22.3246, 24.3561, 0.614648, 0.0688061, "подходит";
    11, 91, 0.00627273, 0.00167273, 0.0154987, 37.062, 26.8208, 0.678769, 0.0825406, "подходит"
]
# Длина заряда, обеспечивающая заданную длину горения с убранными шашками:
L_зI := round(S_г/(π*nn*(D_нI + D_вI)), 4) = 0.0167
vvv := augment("выигрыш в", L_ду - (L_1 + L_2 + L_3 + L_зI), "м")
χ_вн := 4*L_зI/D_вI = 39.2941
χ_нар := 4*nn*D_нI*L_зI/(D_км^2 - nn*D_нI^2) = 22.5732
vvv = ["выигрыш в", 0.024368, "м"]
# [area: Воспламенитель]
# Характеристики ДУ
# Диаметр камеры ДУ
D_к := D_км = 0.07
# Диаметр критического сечения сопла:
d_kr := sqrt(4*F_кр/π) = 0.0113983
# Атмосферное давление:
p_н := 0.1*10^6
# Характеристики воспламенителя
# Газовая постоянная:
R_в := 314
# Теплота сгорания:
Q_в := 3050*10^3
# Толщина горящего свода:
e1_в := 0.001
# Показатель адиабаты:
k_в := 1.25
# Плотность:
δ_в := 1100
# Показатель дегрессивности:
m1 := 2.735
# Скорость горения:
u_в := e1_в/t_в = 0.333333
# Характеристики заряда твердого топлива (ТТ):
# Показатель степени закона горения:
ν := 0.69
# Единичная скорость горения:
u_1 := 4.108  # мм/(с*МПа^ν)
# Плотность:
δ := ρ_т = 1640
# Показатель адиабаты:
k = 1.25
# Длина цилиндрической  обечайки:
l := L_зI = 0.0167
# Температура вспышки твердого топлива:
T_s := 350
# Коэффициент теплопроводности ТТ:
λ := 1.1
T_в := (k_в - 1)/k_в*Q_в/R_в = 1942.68  # температура продуктов сгорания воспламенителя в момент вспышки ТТ:
b_2 := k_в/W_0*sqrt(R_в*T_в)*A(k)*F_кр + (k_в - 1)/W_0*σ_т*ν_т*F_охл/R_в = 1639.87
u_1zv := u_1/10^(3 + 6*ν) = 2.97598e-7  # м/(c*МПа^ν)
t_в = 0.003  # время горения воспламенителя
t_всп := t_в/4 = 0.00075
p_всп(T_н) := (3/2*λ/u_1zv*R_в/(σ_т*t_всп)*(T_s - T_н)/(1 + (T_s + T_н)/(2*T_в)))^(1/(1 + ν))
p_всп(-60 + 273) = 9870382
p_вmax := 1.1*p_всп(-60 + 273) = 10857420
S_гв0 := W_0/((k_в - 1)*Q_в*u_в*δ_в)*p_вmax*b_2*(m1/(b_2*t_в))^(m1/(m1 - b_2*t_в))  # потребная начальная площадь горения воспламенителя
b_1 := (k_в - 1)/W_0*Q_в*S_гв0*u_в*δ_в
m_в := S_гв0*δ_в*e1_в*(1 - e^(-m1))/m1 = 0.00208378
W_в := m_в/δ_в = 1.89435e-6  # объем занимаемый вослпаменителем
ll_в := W_в/(π*0.0056^2) = 0.019228
t := 0, 0.00001 .. t_в
p_в(t) := (p_н + b_1/(m1/t_в - b_2))*e^(-b_2*t) - b_1/(m1/t_в - b_2)*e^(-m1*t/t_в)
m_в = 0.00208378
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# [area: Система]
# В общем случае:
# Площадь горения
S_T(z) := π*(D_нI - 2*z)*(L_зI - 2*z) + π*(D_вI + 2*z)*(L_зI - 2*z) + 2*(π*(D_нI - 2*z)^2/4 - π*(D_вI + 2*z)^2/4)
z := 0, 0.00001 .. e_0/2
S(z) := S_T(z)*nn
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S_T(z) :=
    (S_T(z)*nn) if z ≤ e_0/2
    0 otherwise
ξ_p(p, z, T_н) :=
    1 if (p ≥ p_всп(T_н))
    0 otherwise
ξ_в(t) :=
    1 if t ≤ t_в
    0 otherwise
ξ_з(z) :=
    1 if 0 ≤ z ≤ e_0/2
    0 otherwise
nu := [p_н; W_0; 0; 0; 0] = [100000; 4.17176e-5; 0; 0; 0]
μ_c*A(k)*F_кр*(p_min*10^6)/sqrt(χ_тепл*R*T_0) = 2.5104
ρ_т*S_T(e_0/4)*u(p_min*10^6, -60 + 273) = 2.45793
p, W, ω_г, ω_гв, e
SYST2(t, x, t_n) := [
    1/x[1]*((k - 1)*Q_в*(δ_в*S_гв0*e^(-m1*t/t_в)*u_в*ξ_в(t)) + (k - 1)*Q*(ρ_т*S_T(x[4])*u(x[0], t_n)) - k*μ_c*A(k)*F_кр*x[0]*sqrt(χ_тепл*R*T_0) - (k - 1)*σ_т*ν_т*F_охл*x[0]/R - k*x[0]/δ_в*(δ_в*S_гв0*e^(-m1*t/t_в)*u_в*ξ_в(t)) - k*x[0]*ξ_з(x[4])/ρ_т*(ρ_т*S_T(x[4])*u(x[0], t_n)));
    1/δ_в*(δ_в*S_гв0*e^(-m1*t/t_в)*u_в*ξ_в(t)) + 1/ρ_т*(ρ_т*S_T(x[4])*u(x[0], t_n)*(ξ_p(x[0], x[4], t_n)*ξ_з(x[4])));
    ρ_т*S_T(x[4])*u(x[0], t_n);
    δ_в*S_гв0*e^(-m1*t/t_в)*u_в*ξ_в(t);
    u(x[0], t_n)*ξ_p(x[0], x[4], t_n)*ξ_з(x[4])
]
v := 1500
sys(t, x) := SYST2(t, x, 18 + 273)
sys_60(t, x) := SYST2(t, x, 60 + 273)
sys__60(t, x) := SYST2(t, x, -60 + 273)
B := rkfixed(nu, 0, t_д, v, sys)
B_60 := rkfixed(nu, 0, t_д, v, sys_60)
B__60 := rkfixed(nu, 0, t_д, v, sys__60)
index :=
    i ← 0
    while B__60[:, 1][i] < p_всп(-60 + 273)
        i ← i + 1
    i
ind :=
    i ← 0
    while B__60[:, 5][i] < e_0/2
        i ← i + 1
    i
index = 12
ind = 1353
t_г := t_г + B__60[:, 0][index]  # disabled
B__60[:, 0][ind] = 0.0281875
t_г - B__60[:, 0][ind] = -0.0016965
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B__60 = [
    0, 100000, 4.17176e-5, 0, 0, 0;
    2.08333e-5, 953103, 4.17558e-5, 3.50426e-6, 4.19246e-5, 0;
    4.16667e-5, 1811738, 4.17932e-5, 8.82613e-6, 8.30604e-5, 0;
    6.25e-5, 2674782, 4.18299e-5, 1.5928e-5, 0.000123422, 0;
    8.33333e-5, 3541105, 4.18659e-5, 2.47706e-5, 0.000163025, 0;
    0.000104167, 4409579, 4.19012e-5, 3.53132e-5, 0.000201882, 0;
    0.000125, 5279090, 4.19358e-5, 4.75139e-5, 0.000240009, 0;
    0.000145833, 6148539, 4.19698e-5, 6.13303e-5, 0.000277418, 0;
    0.000166667, 7016856, 4.20032e-5, 7.67189e-5, 0.000314123, 0;
    0.0001875, 7883004, 4.2036e-5, 9.36363e-5, 0.000350138, 0
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]
# [area: Тяга и суммарный импульс]
PP_60 :=
    i ← 0
    for i ∈ 0 .. v
        y[i] ← μ_c*A(k)*B_60[:, 1][i]*F_кр/sqrt(χ_тепл*R*T_0)*sqrt(2*k/(k - 1)*(R*T_0)*(1 - pi(λ_a)^((k - 1)/k))) + π*D_a^2/4*(B_60[:, 1][i]*pi(λ_a) - p_н)
    y
PP__60 :=
    i ← 0
    for i ∈ 0 .. v
        y[i] ← μ_c*A(k)*B__60[:, 1][i]*F_кр/sqrt(χ_тепл*R*T_0)*sqrt(2*k/(k - 1)*(R*T_0)*(1 - pi(λ_a)^((k - 1)/k))) + π*D_a^2/4*(B__60[:, 1][i]*pi(λ_a) - p_н)
    y
PP :=
    i ← 0
    for i ∈ 0 .. v
        y[i] ← μ_c*A(k)*B[:, 1][i]*F_кр/sqrt(χ_тепл*R*T_0)*sqrt(2*k/(k - 1)*(R*T_0)*(1 - pi(λ_a)^((k - 1)/k))) + π*D_a^2/4*(B[:, 1][i]*pi(λ_a) - p_н)
    y
P := P/10^3
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P*10^3 = 8149
PPP_60(t1) := linterp(B_60[:, 0], PP_60, t1)
PPP(t1) := linterp(B[:, 0], PP, t1)
PPP__60(t1) := linterp(B__60[:, 0], PP__60, t1)
integral(PPP__60(t), t = 0 .. t_д) = 152.628
J_Σ = 140
p__60(t) := linterp(B__60[:, 0], B__60[:, 1], t)
(integral(PPP__60(t), t = 0 .. t_д) - J_Σ)/J_Σ*100 = 9.01985
ξ_получ := (integral(p__60(t), t = 0 .. t_д)/(t_д*p_min*10^6)) = 0.88147
ξ_получ := (integral(p__60(t), t = 0 .. t_д)/(t_д*max(B__60[:, 1]))) = 0.660041
ξ = 0.66397
